<?xml version="1.0" encoding="utf-8"?>
<fdm_config xmlns:xsi="http://www.w3.org/2001/XMLSchema-instance" name="viper" version="2.0" release="BETA" xsi:noNamespaceSchemaLocation="http://jsbsim.sourceforge.net/JSBSim.xsd">
  <fileheader>
    <author>Trent Conley</author>
    <filecreationdate>2024-07-26</filecreationdate>
    <version>$Revision: 1.14 $</version>
    <description>Mach Industries viper</description>
    <note>This model was created using publicly available data, publicly available technical reports, textbooks, and guesses. It contains no proprietary or restricted data. If this model has been validated at all, it would be only to the extent that it seems to 'fly right', and that it possibly complies with published, publicly known, performance data (maximum speed, endurance, etc.). Thus, this model is meant for educational and entertainment purposes only. This simulation model is not endorsed by the manufacturer. This model is not to be sold.</note>
  </fileheader>
  <metrics>
    <wingarea unit="M2">0.4676</wingarea>
    <wingspan unit="M">1</wingspan>
    <chord unit="M">0.46225</chord>
    <htailarea unit="M2">0</htailarea>
    <htailarm unit="M">0</htailarm>
    <vtailarea unit="M2">0</vtailarea>
    <vtailarm unit="M">0</vtailarm>
    <location name="AERORP" unit="M">
      <x>2</x>
      <y>0</y>
      <z>1</z>
    </location>
  </metrics>
  <mass_balance negated_crossproduct_inertia="true">
    <ixx unit="KG*M2">0.3833181459</ixx>
    <iyy unit="KG*M2">4.308286672</iyy>
    <izz unit="KG*M2">4.4730240310000005</izz>
    <ixy unit="KG*M2">-0.0015680644</ixy>
    <ixz unit="KG*M2">0.0766203063</ixz>
    <iyz unit="KG*M2">0.00042827910000000003</iyz>
    <emptywt unit="KG">21.2814</emptywt>
    <location name="CG" unit="M">
      <x>2</x>
      <y>0.0003848</y>
      <z>0.9891532999999999</z>
    </location>
  </mass_balance>
  <!-- Ground reactions are adapted from the x24B aircraft. Placeholder values. -->
  <ground_reactions>
    <contact type="BOGEY" name="NOSE">
        <location unit="IN">
            <x> 80 </x>
            <y> 0 </y>
            <z> -18 </z>
        </location>
        <static_friction> 0.5 </static_friction>
        <dynamic_friction> 0.02 </dynamic_friction>
        <rolling_friction> 0.02 </rolling_friction>
        <spring_coeff unit="LBS/FT"> 5000 </spring_coeff>
        <damping_coeff unit="LBS/FT/SEC"> 300 </damping_coeff>
        <max_steer unit="DEG"> 0.0 </max_steer>
        <brake_group> NONE </brake_group>
        <retractable> 0 </retractable>
    </contact>
    <contact type="BOGEY" name="LEFT_SKID">
        <location unit="IN">
            <x> 200 </x>
            <y> -18 </y>
            <z> -30 </z>
        </location>
        <static_friction> 0.9 </static_friction>
        <dynamic_friction> 0.2 </dynamic_friction>
        <rolling_friction> 0.2 </rolling_friction>
        <spring_coeff unit="LBS/FT"> 5000 </spring_coeff>
        <damping_coeff unit="LBS/FT/SEC"> 300 </damping_coeff>
        <max_steer unit="DEG"> 0.0 </max_steer>
        <brake_group> NONE </brake_group>
        <retractable> 0 </retractable>
    </contact>
    <contact type="BOGEY" name="RIGHT_SKID">
        <location unit="IN">
            <x> 200 </x>
            <y> 18 </y>
            <z> -30 </z>
        </location>
        <static_friction> 0.9 </static_friction>
        <dynamic_friction> 0.2 </dynamic_friction>
        <rolling_friction> 0.2 </rolling_friction>
        <spring_coeff unit="LBS/FT"> 5000 </spring_coeff>
        <damping_coeff unit="LBS/FT/SEC"> 300 </damping_coeff>
        <max_steer unit="DEG"> 0.0 </max_steer>
        <brake_group> NONE </brake_group>
        <retractable> 0 </retractable>
    </contact>
  </ground_reactions>
  <propulsion>
    <engine file="K450">
      <feed>0</feed>
      <thruster file="direct">
        <location unit="M">
          <x>2</x>
          <y>0.0003848</y>
          <z>0.9891532999999999</z>
        </location>
        <orient unit="DEG">
          <roll>0.0</roll>
          <pitch>0.0</pitch>
          <yaw>0.0</yaw>
        </orient>
      </thruster>
    </engine>
    <tank type="FUEL">
      <location unit="M">
        <x>1.5599973999999999</x>
        <y>-0.000028400000000000003</y>
        <z>0.9980006</z>
      </location>
      <capacity unit="KG">1.6</capacity>
      <contents unit="KG">1.6</contents>
    </tank>
  </propulsion>
  <flight_control name="FCS: Viper">
    <property value="1">/controls/engines/engine[0]/starter</property>
    <!-- No hardcoded flight controller. We control that. -->
    <!-- <channel name="Pitch">
            <summer name="Pitch Trim Sum">
                <input>fcs/elevator-cmd-norm</input>
                <input>fcs/pitch-trim-cmd-norm</input>
                <clipto>
                    <min>-1</min>
                    <max>1</max>
                </clipto>
            </summer>

            <aerosurface_scale name="Pitch Command Scale">
                <input>fcs/pitch-trim-sum</input>
                <range>
                    <min>-50</min>
                    <max>50</max>
                </range>
            </aerosurface_scale>

            <pure_gain name="Pitch Gain 1">
                <input>fcs/pitch-command-scale</input>
                <gain>-0.36</gain>
            </pure_gain>

            <scheduled_gain name="Pitch Scheduled Gain 1">
                <input>fcs/pitch-gain-1</input>
                <gain>0.017</gain>
                <table>
                    <independentVar>fcs/elevator-pos-rad</independentVar>
                    <tableData>
                        -0.68  -26.548
                        -0.595 -20.513
                        -0.51  -15.328
                        -0.425 -10.993
                        -0.34   -7.508
                        -0.255  -4.873
                        -0.17   -3.088
                        -0.085  -2.153
                         0      -2.068
                         0.085  -2.833
                         0.102  -3.088
                         0.119  -3.377
                         0.136  -3.7
                         0.153  -4.057
                         0.17   -4.448
                         0.187  -4.873
                         0.272  -7.508
                         0.357 -10.993
                         0.442 -15.328
                         0.527 -20.513
                         0.612 -26.548
                         0.697 -33.433
                    </tableData>
                </table>
            </scheduled_gain>

            <pure_gain name="Pitch SAS Feedback">
                <input>velocities/q-rad_sec</input>
                <gain>0.75</gain>
            </pure_gain>

            <summer name="Elevator Positioning">
                <input>fcs/pitch-scheduled-gain-1</input>
                <input>fcs/pitch-sas-feedback</input>
                <clipto>
                    <min>-0.26</min>
                    <max>0.61</max>
                </clipto>
            </summer>

            <lag_filter name="Elevator Filter">
                <input>fcs/elevator-positioning</input>
                <c1>600</c1>
                <output>fcs/elevator-pos-rad</output>
            </lag_filter>

        </channel>

        <channel name="Roll">

            <aerosurface_scale name="Roll Command Scale">
                <input>fcs/aileron-cmd-norm</input>
                <range>
                    <min>-20</min>
                    <max>20</max>
                </range>
            </aerosurface_scale>

            <pure_gain name="Roll Gain 1">
                <input>fcs/roll-command-scale</input>
                <gain>0.42</gain>
            </pure_gain>

            <pure_gain name="Roll Gain 2">
                <input>fcs/roll-gain-1</input>
                <gain>0.027</gain>
            </pure_gain>

            <pure_gain name="Yaw-Roll Crossover Gain">
                <input>velocities/r-rad_sec</input>
                <gain>-0.9</gain>
            </pure_gain>

            <summer name="Yaw Coupled Aileron Feedback Sum">
                <input>velocities/p-rad_sec</input>
                <input>fcs/yaw-roll-crossover-gain</input>
            </summer>

            <pure_gain name="Roll SAS Gain">
                <input>fcs/yaw-coupled-aileron-feedback-sum</input>
                <gain>-0.5</gain>
            </pure_gain>

            <summer name="Aileron Positioning">
                <input>fcs/roll-gain-2</input>
                <input>fcs/roll-sas-gain</input>
                <clipto>
                    <min>-0.35</min>
                    <max>0.35</max>
                </clipto>
                <output>fcs/left-aileron-pos-rad</output>
            </summer>

        </channel>

        <channel name="Yaw">

            <aerosurface_scale name="Yaw Command Scale">
                <input>fcs/rudder-cmd-norm</input>
                <range>
                    <min>-250</min>
                    <max>250</max>
                </range>
            </aerosurface_scale>

            <pure_gain name="Yaw Gain 1">
                <input>fcs/yaw-command-scale</input>
                <gain>0.082</gain>
            </pure_gain>

            <pure_gain name="Yaw Gain 2">
                <input>fcs/yaw-gain-1</input>
                <gain>0.04</gain>
            </pure_gain>

            <pure_gain name="Yaw SAS Gain">
                <input>velocities/r-rad_sec</input>
                <gain>0.3</gain>
            </pure_gain>

            <summer name="Rudder Positioning">
                <input>fcs/yaw-gain-2</input>
                <input>fcs/yaw-sas-gain</input>
                <clipto>
                    <min>-0.52</min>
                    <max>0.52</max>
                </clipto>
                <output>fcs/rudder-pos-rad</output>
            </summer>
        </channel> -->
  </flight_control>
  <aerodynamics>
    <axis name="X" frame="BODY">
      <function name="aero/coefficient/CX_body">
        <description>X_body_force_from_adb Coefficient</description>
        <product>
          <property>aero/qbar-psf</property>
          <property>metrics/Sw-sqft</property>
          <interpolatend>
            <property>aero/alpha-rad</property>
            <property>aero/beta-rad</property>
            <property>fcs/elevator-pos-rad</property>
            <property>fcs/rudder-pos-rad</property>
            <matrix>-0.0698132 0.0000000 0.0000000 0.0000000 -0.0122043
0.0000000 0.0000000 0.0000000 0.0000000 -0.0185284
0.0698132 0.0000000 0.0000000 0.0000000 -0.0132092
0.3490659 0.0000000 0.1745329 0.0000000 0.0088926
0.0000000 0.0000000 0.3490659 0.1745329 -0.0387623
0.2792527 0.0000000 -0.1745329 0.1745329 0.0101725
-0.0698132 0.0000000 -0.3490659 0.3490659 -0.0499020
0.2094395 -0.1745329 0.0000000 0.3490659 -0.0330549
0.7853982 -0.1745329 0.1745329 0.3490659 -0.0222271
0.1396263 -0.1745329 0.3490659 -0.1745329 -0.0162888
0.5235988 -0.1745329 -0.1745329 -0.1745329 0.0040192
0.0698132 -0.1745329 -0.3490659 -0.3490659 -0.0410099
0.3490659 -0.3490659 0.0000000 -0.3490659 -0.0047979
0.0000000 -0.3490659 0.3490659 0.0000000 -0.0306315
0.2792527 -0.3490659 -0.1745329 0.0000000 0.0004771
-0.0698132 -0.3490659 -0.3490659 0.1745329 -0.0460294
0.2094395 0.1745329 0.0000000 0.1745329 0.0067681
0.7853982 0.1745329 0.1745329 0.1745329 -0.0292866
0.1396263 0.1745329 0.3490659 0.3490659 -0.0247307
0.5235988 0.1745329 -0.1745329 0.3490659 -0.0044126
0.0698132 0.1745329 -0.3490659 -0.1745329 -0.0398631
0.3490659 0.3490659 0.0000000 -0.1745329 -0.0120636
0.0000000 0.3490659 0.1745329 -0.3490659 -0.0803390
0.2792527 0.3490659 0.3490659 -0.3490659 -0.0537183
-0.0698132 0.3490659 -0.3490659 0.0000000 -0.0228104
0.7853982 0.3490659 -0.3490659 -0.3490659 -0.0004853
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end
</matrix>
          </interpolatend>
        </product>
      </function>
    </axis>
    <axis name="Y" frame="BODY">
      <function name="aero/coefficient/CY_body">
        <description>Y_body_force_from_adb Coefficient</description>
        <product>
          <property>aero/qbar-psf</property>
          <property>metrics/Sw-sqft</property>
          <interpolatend>
            <property>aero/alpha-rad</property>
            <property>aero/beta-rad</property>
            <property>fcs/elevator-pos-rad</property>
            <property>fcs/rudder-pos-rad</property>
            <matrix>-0.0698132 0.0000000 0.0000000 0.0000000 0.0000122
0.0000000 0.0000000 0.0000000 0.0000000 -0.0000258
0.0698132 0.0000000 0.0000000 0.0000000 -0.0000286
0.3490659 0.0000000 0.1745329 0.0000000 -0.0001026
0.0000000 0.0000000 0.3490659 0.1745329 0.0322738
0.2792527 0.0000000 -0.1745329 0.1745329 0.0260741
-0.0698132 0.0000000 -0.3490659 0.3490659 0.0737778
0.2094395 -0.1745329 0.0000000 0.3490659 0.1084541
0.7853982 -0.1745329 0.1745329 0.3490659 0.0665664
0.1396263 -0.1745329 0.3490659 -0.1745329 -0.0011084
0.5235988 -0.1745329 -0.1745329 -0.1745329 -0.1145142
0.0698132 -0.1745329 -0.3490659 -0.3490659 -0.0226007
0.3490659 -0.3490659 0.0000000 -0.3490659 -0.0978105
0.0000000 -0.3490659 0.3490659 0.0000000 0.1149933
0.2792527 -0.3490659 -0.1745329 0.0000000 0.0003648
-0.0698132 -0.3490659 -0.3490659 0.1745329 0.1322499
0.2094395 0.1745329 0.0000000 0.1745329 0.0115735
0.7853982 0.1745329 0.1745329 0.1745329 -0.0673454
0.1396263 0.1745329 0.3490659 0.3490659 0.0290423
0.5235988 0.1745329 -0.1745329 0.3490659 0.1159383
0.0698132 0.1745329 -0.3490659 -0.1745329 -0.0849978
0.3490659 0.3490659 0.0000000 -0.1745329 0.0222139
0.0000000 0.3490659 0.1745329 -0.3490659 -0.1667454
0.2792527 0.3490659 0.3490659 -0.3490659 -0.0638576
-0.0698132 0.3490659 -0.3490659 0.0000000 -0.1126728
0.7853982 0.3490659 -0.3490659 -0.3490659 -0.1111077
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end
</matrix>
          </interpolatend>
        </product>
      </function>
    </axis>
    <axis name="Z" frame="BODY">
      <function name="aero/coefficient/CZ_body">
        <description>Z_body_force_from_adb Coefficient</description>
        <product>
          <property>aero/qbar-psf</property>
          <property>metrics/Sw-sqft</property>
          <interpolatend>
            <property>aero/alpha-rad</property>
            <property>aero/beta-rad</property>
            <property>fcs/elevator-pos-rad</property>
            <property>fcs/rudder-pos-rad</property>
            <matrix>-0.0698132 0.0000000 0.0000000 0.0000000 0.1904237
0.0000000 0.0000000 0.0000000 0.0000000 0.0122967
0.0698132 0.0000000 0.0000000 0.0000000 -0.1634989
0.3490659 0.0000000 0.1745329 0.0000000 -1.0495777
0.0000000 0.0000000 0.3490659 0.1745329 -0.1383242
0.2792527 0.0000000 -0.1745329 0.1745329 -0.6186818
-0.0698132 0.0000000 -0.3490659 0.3490659 0.3739546
0.2094395 -0.1745329 0.0000000 0.3490659 -0.5280126
0.7853982 -0.1745329 0.1745329 0.3490659 -1.7335043
0.1396263 -0.1745329 0.3490659 -0.1745329 -0.5040122
0.5235988 -0.1745329 -0.1745329 -0.1745329 -1.4396236
0.0698132 -0.1745329 -0.3490659 -0.3490659 -0.0095927
0.3490659 -0.3490659 0.0000000 -0.3490659 -1.0210522
0.0000000 -0.3490659 0.3490659 0.0000000 -0.0946714
0.2792527 -0.3490659 -0.1745329 0.0000000 -0.6817296
-0.0698132 -0.3490659 -0.3490659 0.1745329 0.3754433
0.2094395 0.1745329 0.0000000 0.1745329 -0.5526657
0.7853982 0.1745329 0.1745329 0.1745329 -1.6865640
0.1396263 0.1745329 0.3490659 0.3490659 -0.5036317
0.5235988 0.1745329 -0.1745329 0.3490659 -1.4186456
0.0698132 0.1745329 -0.3490659 -0.1745329 -0.0236950
0.3490659 0.3490659 0.0000000 -0.1745329 -0.9921797
0.0000000 0.3490659 0.1745329 -0.3490659 0.0089615
0.2792527 0.3490659 0.3490659 -0.3490659 -0.9227464
-0.0698132 0.3490659 -0.3490659 0.0000000 0.3538699
0.7853982 0.3490659 -0.3490659 -0.3490659 -1.6832769
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end
</matrix>
          </interpolatend>
        </product>
      </function>
    </axis>
    <axis name="ROLL" frame="BODY">
      <function name="aero/coefficient/Clp">
        <description>Roll_moment_due_to_roll_rate_(roll_damping) Coefficient</description>
        <product>
          <property>aero/qbar-psf</property>
          <property>metrics/Sw-sqft</property>
          <property>metrics/cbarw-ft</property>
          <property>aero/bi2vel</property>
          <property>velocities/p-rad_sec</property>
          <value>-0.4</value>
        </product>
      </function>
      <function name="aero/coefficient/Clr">
        <description>Roll_moment_due_to_yaw_rate Coefficient</description>
        <product>
          <property>aero/qbar-psf</property>
          <property>metrics/Sw-sqft</property>
          <property>metrics/cbarw-ft</property>
          <property>aero/bi2vel</property>
          <property>velocities/r-rad_sec</property>
          <value>0</value>
        </product>
      </function>
      <function name="aero/coefficient/CLL_body">
        <description>Roll_moment_from_adb Coefficient</description>
        <product>
          <property>aero/qbar-psf</property>
          <property>metrics/Sw-sqft</property>
          <property>metrics/cbarw-ft</property>
          <interpolatend>
            <property>aero/alpha-rad</property>
            <property>aero/beta-rad</property>
            <property>fcs/elevator-pos-rad</property>
            <property>fcs/rudder-pos-rad</property>
            <matrix>-0.0698132 0.0000000 0.0000000 0.0000000 -0.0000486
0.0000000 0.0000000 0.0000000 0.0000000 0.0000280
0.0698132 0.0000000 0.0000000 0.0000000 0.0000931
0.3490659 0.0000000 0.1745329 0.0000000 0.0012963
0.0000000 0.0000000 0.3490659 0.1745329 0.0066818
0.2792527 0.0000000 -0.1745329 0.1745329 0.0141408
-0.0698132 0.0000000 -0.3490659 0.3490659 0.0315865
0.2094395 -0.1745329 0.0000000 0.3490659 0.0945621
0.7853982 -0.1745329 0.1745329 0.3490659 0.0525783
0.1396263 -0.1745329 0.3490659 -0.1745329 0.0524958
0.5235988 -0.1745329 -0.1745329 -0.1745329 0.0464621
0.0698132 -0.1745329 -0.3490659 -0.3490659 0.0052789
0.3490659 -0.3490659 0.0000000 -0.3490659 0.1457945
0.0000000 -0.3490659 0.3490659 0.0000000 0.0387039
0.2792527 -0.3490659 -0.1745329 0.0000000 0.1472360
-0.0698132 -0.3490659 -0.3490659 0.1745329 0.0314016
0.2094395 0.1745329 0.0000000 0.1745329 -0.0660667
0.7853982 0.1745329 0.1745329 0.1745329 -0.0478688
0.1396263 0.1745329 0.3490659 0.3490659 -0.0465985
0.5235988 0.1745329 -0.1745329 0.3490659 -0.0395014
0.0698132 0.1745329 -0.3490659 -0.1745329 -0.0578656
0.3490659 0.3490659 0.0000000 -0.1745329 -0.1532585
0.0000000 0.3490659 0.1745329 -0.3490659 -0.0467974
0.2792527 0.3490659 0.3490659 -0.3490659 -0.1948159
-0.0698132 0.3490659 -0.3490659 0.0000000 -0.0116706
0.7853982 0.3490659 -0.3490659 -0.3490659 -0.0830633
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end
</matrix>
          </interpolatend>
        </product>
      </function>
    </axis>
    <axis name="PITCH" frame="BODY">
      <function name="aero/coefficient/Cmq">
        <description>Pitch_moment_due_to_pitch_rate Coefficient</description>
        <product>
          <property>aero/qbar-psf</property>
          <property>metrics/Sw-sqft</property>
          <property>metrics/cbarw-ft</property>
          <property>aero/ci2vel</property>
          <property>velocities/q-rad_sec</property>
          <value>-0.4</value>
        </product>
      </function>
      <function name="aero/coefficient/CLM_body">
        <description>Pitch_moment_from_adb Coefficient</description>
        <product>
          <property>aero/qbar-psf</property>
          <property>metrics/Sw-sqft</property>
          <property>metrics/cbarw-ft</property>
          <interpolatend>
            <property>aero/alpha-rad</property>
            <property>aero/beta-rad</property>
            <property>fcs/elevator-pos-rad</property>
            <property>fcs/rudder-pos-rad</property>
            <matrix>-0.0698132 0.0000000 0.0000000 0.0000000 0.0859071
0.0000000 0.0000000 0.0000000 0.0000000 0.0454341
0.0698132 0.0000000 0.0000000 0.0000000 0.0065794
0.3490659 0.0000000 0.1745329 0.0000000 -0.0425877
0.0000000 0.0000000 0.3490659 0.1745329 -0.0720461
0.2792527 0.0000000 -0.1745329 0.1745329 0.0774675
-0.0698132 0.0000000 -0.3490659 0.3490659 0.2326670
0.2094395 -0.1745329 0.0000000 0.3490659 -0.0192208
0.7853982 -0.1745329 0.1745329 0.3490659 -0.0676206
0.1396263 -0.1745329 0.3490659 -0.1745329 -0.1310954
0.5235988 -0.1745329 -0.1745329 -0.1745329 -0.0006284
0.0698132 -0.1745329 -0.3490659 -0.3490659 0.1309258
0.3490659 -0.3490659 0.0000000 -0.3490659 -0.0466877
0.0000000 -0.3490659 0.3490659 0.0000000 -0.0057899
0.2792527 -0.3490659 -0.1745329 0.0000000 0.0569442
-0.0698132 -0.3490659 -0.3490659 0.1745329 0.2697146
0.2094395 0.1745329 0.0000000 0.1745329 -0.0228284
0.7853982 0.1745329 0.1745329 0.1745329 -0.0521591
0.1396263 0.1745329 0.3490659 0.3490659 -0.1337730
0.5235988 0.1745329 -0.1745329 0.3490659 0.0016790
0.0698132 0.1745329 -0.3490659 -0.1745329 0.1194789
0.3490659 0.3490659 0.0000000 -0.1745329 -0.0240246
0.0000000 0.3490659 0.1745329 -0.3490659 0.0719002
0.2792527 0.3490659 0.3490659 -0.3490659 -0.1271534
-0.0698132 0.3490659 -0.3490659 0.0000000 0.2344768
0.7853982 0.3490659 -0.3490659 -0.3490659 0.0957340
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end
</matrix>
          </interpolatend>
        </product>
      </function>
    </axis>
    <axis name="YAW" frame="BODY">
      <function name="aero/coefficient/Cnr">
        <description>Yaw_moment_due_to_yaw_rate Coefficient</description>
        <product>
          <property>aero/qbar-psf</property>
          <property>metrics/Sw-sqft</property>
          <property>metrics/cbarw-ft</property>
          <property>aero/bi2vel</property>
          <property>velocities/r-rad_sec</property>
          <value>-0.4</value>
        </product>
      </function>
      <function name="aero/coefficient/Cnp">
        <description>Yaw_moment_due_to_roll_rate Coefficient</description>
        <product>
          <property>aero/qbar-psf</property>
          <property>metrics/Sw-sqft</property>
          <property>metrics/cbarw-ft</property>
          <property>aero/bi2vel</property>
          <property>velocities/p-rad_sec</property>
          <value>0</value>
        </product>
      </function>
      <function name="aero/coefficient/CLN_body">
        <description>Yaw_moment_from_adb Coefficient</description>
        <product>
          <property>aero/qbar-psf</property>
          <property>metrics/Sw-sqft</property>
          <property>metrics/cbarw-ft</property>
          <interpolatend>
            <property>aero/alpha-rad</property>
            <property>aero/beta-rad</property>
            <property>fcs/elevator-pos-rad</property>
            <property>fcs/rudder-pos-rad</property>
            <matrix>-0.0698132 0.0000000 0.0000000 0.0000000 -0.0000644
0.0000000 0.0000000 0.0000000 0.0000000 -0.0000205
0.0698132 0.0000000 0.0000000 0.0000000 -0.0000277
0.3490659 0.0000000 0.1745329 0.0000000 -0.0002402
0.0000000 0.0000000 0.3490659 0.1745329 -0.0392069
0.2792527 0.0000000 -0.1745329 0.1745329 -0.0346269
-0.0698132 0.0000000 -0.3490659 0.3490659 -0.0917597
0.2094395 -0.1745329 0.0000000 0.3490659 -0.1396285
0.7853982 -0.1745329 0.1745329 0.3490659 0.0516928
0.1396263 -0.1745329 0.3490659 -0.1745329 0.0308236
0.5235988 -0.1745329 -0.1745329 -0.1745329 -0.0151540
0.0698132 -0.1745329 -0.3490659 -0.3490659 0.0740001
0.3490659 -0.3490659 0.0000000 -0.3490659 0.0274866
0.0000000 -0.3490659 0.3490659 0.0000000 -0.0461558
0.2792527 -0.3490659 -0.1745329 0.0000000 0.0029523
-0.0698132 -0.3490659 -0.3490659 0.1745329 -0.0693241
0.2094395 0.1745329 0.0000000 0.1745329 -0.0215113
0.7853982 0.1745329 0.1745329 0.1745329 -0.0653970
0.1396263 0.1745329 0.3490659 0.3490659 -0.0647335
0.5235988 0.1745329 -0.1745329 0.3490659 0.0009078
0.0698132 0.1745329 -0.3490659 -0.1745329 0.0601170
0.3490659 0.3490659 0.0000000 -0.1745329 0.0729899
0.0000000 0.3490659 0.1745329 -0.3490659 0.1172679
0.2792527 0.3490659 0.3490659 -0.3490659 0.1270681
-0.0698132 0.3490659 -0.3490659 0.0000000 0.0449850
0.7853982 0.3490659 -0.3490659 -0.3490659 0.1570295
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end
</matrix>
          </interpolatend>
        </product>
      </function>
    </axis>
  </aerodynamics>
</fdm_config>
